/COM, FELyX FE Model, exported to ANSYS archive format
/COM, ------------------------------------------------
/COM,

FINISH
/CLEAR,START
/PREP7
/NOPR
/TITLE, Model exported by FELyX Toolbox - File: /home/roosre/roosre/felyxtoolcourse/felyx/felyx_2/tutorial/DucatiFrameSolution.ansysnew

! SCALAR PARAMETERS
! -----------------
*SET, A0 , 70.6858
*SET, A1 , 96.604
*SET, A2 , 124.878
*SET, A3 , 725.708
*SET, A4 , 113.097
*SET, AE , 201.062
*SET, FORCE , 23320.5
*SET, I , 208
*SET, I0 , 2007.92
*SET, I1 , 5101.9
*SET, I2 , 10997.1
*SET, I3 , 538657
*SET, I4 , 1017.88
*SET, IE , 3216.99
*SET, IP0 , 4015.84
*SET, IP1 , 10203.8
*SET, IP2 , 21994.2
*SET, IP3 , 1.07731e+06
*SET, IP4 , 10
*SET, IPE , 6433.98
*SET, J , 209
*SET, K , 0
*SET, K1 , 106
*SET, K2 , 206
*SET, M , 4.256e+06
*SET, N , 16
*SET, NEGWIDTH , -90
*SET, NELE , 74
*SET, PI , 3.14159
*SET, POSWIDTH , 90
*SET, RA0 , 8.25
*SET, RA1 , 11
*SET, RA2 , 14
*SET, RA3 , 40
*SET, RA4 , 6
*SET, RE , 8
*SET, RI0 , 6.75
*SET, RI1 , 9.5
*SET, RI2 , 12.5
*SET, RI3 , 37
*SET, RI4 , 0
*SET, T0 , 1.5
*SET, T1 , 1.5
*SET, T2 , 1.5
*SET, T3 , 3
*SET, _BUTTON , 0
*SET, _RETURN , 0
*SET, _STATUS , 0
*SET, _UIQR , 0
*SET, _Z , 1
*SET, _Z11 , 1
*SET, _Z13 , 0
*SET, _ZBFN , 1
*SET, _ZBFO , 1
*SET, _ZICI , 1
*SET, _ZREP , 2
*SET, _ZSFC , 1
*SET, _ZSFCL , 1
*SET, _ZSFN , 2
*SET, _ZSFO , 1
*SET, _ZSFSH , 0

! ELEMENT TYPES
! -------------
ET,  1 , 4
ET,  2 , 4
ET,  102 , 4
ET,  101 , 4


! Key Options
! -----------


! REAL CONSTANTS
! --------------
RLBLOCK,     18,     18,     10,     7
(2i8,6g16.9)
(7g16.9)
       1      10 124.878308      10997.0960      10997.0960      12.5000000      14.0000000      0.00000000
 0.00000000      21994.1920      0.00000000      0.00000000
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
! Coordinate Systems
! ----------------

! No special coordinate systems defined


! NODES
! -----
NBLOCK,6,SOLID
(3i8,6e16.9)
       1       0       0 0.00000000      134.000000      0.00000000
       2       0       0 0.00000000      134.000000      96.0000000
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N,R5.3,LOC, -1,


! ELEMENTS
! --------
EBLOCK,19,SOLID
(19i7)
1      1      1      1      0      0      0      0      2      0      1      1      2
1      1      1      1      0      0      0      0      2      0      2      2      3
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-1


! MATERIALS
! ---------
MPTEMP,R5.0, 1, 1, 0. ,
MPDATA,R5.0, 1,EX,1      , 1, 210000.000
MPTEMP,R5.0, 1, 1, 0. ,
MPDATA,R5.0, 1,PRXY,1      , 1, 0.300000000
MPTEMP,R5.0, 1, 1, 0. ,
MPDATA,R5.0, 1,DENS,1      , 1, 7.85000000e-09
MPTEMP,R5.0, 1, 1, 0. ,
MPDATA,R5.0, 1,EX,2      , 1, 70000.0000
MPTEMP,R5.0, 1, 1, 0. ,
MPDATA,R5.0, 1,PRXY,2      , 1, 0.300000000
MPTEMP,R5.0, 1, 1, 0. ,
MPDATA,R5.0, 1,DENS,2      , 1, 2.70000000e-09


! BOUNDARY CONDTIONS
! ------------------
D,1      ,UX  ,0.00000000
D,1      ,UY  ,0.00000000
D,1      ,UZ  ,0.00000000
D,15     ,UZ  ,0.00000000
F,15     ,MX  ,700000.000
D,17     ,UX  ,0.00000000
D,17     ,UY  ,0.00000000
D,17     ,UZ  ,0.00000000

/GO
FINISH
